<?xml version="1.0"?>
<!--

C-130H: Four Allison T56-A-15 turboprops; 4,591prop shaft horsepower

SOURCE : http://www.jet-engine.net/miltsspec.html

MILTHRUST   [LBS]
MAXTHRUST   [LBS]
idlen1      [%]
maxn1       [%]
idlen2      [%]
maxn2       [%]
betarangeend[%]
    if ThrottleCmd < betarangeend/100.0 then engine power=idle, propeller pitch
    is controled by ThrottleCmd (between MINPITCH and  REVERSEPITCH).
    if ThrottleCmd > betarangeend/100.0 then engine power increases up to max reverse power
reversemaxpower [%]
    max engine power in reverse mode
maxpower    [HP]
psfc power specific fuel consumption [pph/HP] for N1=100%
n1idle_max_delay [-] time constant for N1 change
maxstartenginetime [sec]
    after this time the automatic starting cycle is interrupted when the engine
    doesn't start (0=automatic starting not present)
startern1   [%]
    when starting starter spin up engine to this spin
ielumaxtorque [lb.ft]
    if torque>ielumaxtorque limiters decrease the throttle
    (ielu = Integrated Electronic Limiter Unit)
itt_delay [-] time constant for ITT change
    (ITT = Inter Turbine Temperature)

Some data :

Manufacturer	Model	Application(s)	Power	SFC	Airflow	OPR	Number	LPC	HPC	HPT	IPT	LPT	Length	Width/	Weight
(TO)	(TO)	(TO)		Spools	Stgs	Stgs	Stgs	Stgs	Stgs		Diameter	(dry)

Allison	T56-A-15	C-130H/K, EC-130E, HC-130H/N/P, TC-130H, Hercules C.1/C.3, CC-130H Hercules	4,591	0.540	32	9.6	1	-	14	4	-	-	146.3	44.6	1,848

-->

<turboprop_engine name="Allison T56-A-15">
  <milthrust unit="LBS">      10283.8   </milthrust>
  <idlen1>                       60.0   </idlen1>
  <maxn1>                       105.0   </maxn1>
  <idlen2>                       60.0   </idlen2>
  <maxn2>                       108.0   </maxn2>
  <maxpower unit="HP">         4591.0   </maxpower>
  <psfc unit="LBS/HR/HP">         0.540   </psfc><!-- calculated 0.5253757 --><!--  0.540 from source -->
  <idlefuelflow>                 50.0   </idlefuelflow>
  <n1idle_max_delay>              1     </n1idle_max_delay>
  <maxstartingtime>              20     </maxstartingtime>
  <startern1>                    20     </startern1>
  <ielumaxtorque unit="FT*LB"> 640000   </ielumaxtorque>
  <itt_delay>                     0.05  </itt_delay>
  <betarangeend>                 64     </betarangeend>
  <reversemaxpower>              60     </reversemaxpower>

  <table name="EnginePowerVC">
    <description> Engine power, function of airspeed and pressure </description>
    <independentVar lookup="row">atmosphere/P-sl-psf</independentVar>
    <independentVar lookup="column">velocities/ve-kts</independentVar>
    <tableData>
                 0     50    100    150    200    250
       503   0.357  0.380  0.400  0.425  0.457  0.486
      1048   0.586  0.589  0.600  0.621  0.650  0.686
      1328   0.707  0.721  0.731  0.757  0.786  0.821
      1496   0.779  0.786  0.808  0.821  0.857  0.900
      1684   0.850  0.857  0.874  0.900  0.943  0.979
      1896   0.914  0.929  0.946  0.971  1      1.057
      2135   1      1.011  1.029  1.043  1.083  1.150
      2213   1.029  1.043  1.057  1.079  1.114  1.171
    </tableData>
  </table>

  <table name="EnginePowerRPM_N1" type="internal">
    <description> Engine Power, function of RPM and N1 </description>
    <tableData>
	0	5	60	86	94	95	96	97	98	99	100	101
0 0.00 3.32 3.32 3.32 3.32 3.32 3.32 3.32 3.32 3.32 3.32 3.32
10000 0.00 3.32 232.24 1327.11 2322.43 2521.50 2786.92 3052.34 3317.76 3516.83 3848.60 4114.03
12084 0.00 3.32 199.07 1526.17 2654.21 2853.28 3118.70 3350.94 3649.54 3914.96 4246.74 4512.16
12778 0.00 3.32 33.18 1592.53 2919.63 3151.87 3384.12 3649.54 3948.14 4180.38 4512.16 4777.58
13473 0.00 0.66 0.66 1492.99 2985.99 3284.59 3483.65 3749.07 4047.67 4313.09 4644.87 4943.47
13646 0.00 0.66 0.66 1360.28 2919.63 3185.05 3417.30 3715.89 4014.49 4279.91 4611.69 4930.20
13820 0.00 0.66 0.66 1293.93 2853.28 3118.70 3350.94 3649.54 3981.32 4246.74 4512.16 4644.87
    </tableData>
  </table>

  <table name="ITT_N1" type="internal">
    <description> Inter-Turbine Temperature ITT [deg C] depending on N1 and engine run (0=off / 1=running) </description>
    <tableData>
              0     1
        0     0     0
       15   100   100
       60   180   540
       96   270   730
      100   280   860
    </tableData>
  </table>

</turboprop_engine>
